// SBML level 3 version 1

function Constant_flux__irreversible(v)
  v;
end
Constant_flux__irreversible is "Constant flux (irreversible)";

function Rate_Law_for_v_Clb5_p_1(Hog1_PP, Kp_Clb5, MBF, kI_Clb5_Hog1, kp_Clb5)
  kp_Clb5*MBF/(Kp_Clb5 + MBF)/(1 + kI_Clb5_Hog1*Hog1_PP);
end

function Rate_Law_for_v_Clb5_rel_1(Clb5, Clb5_Sic1, Cln2, Kpp_Clb5_Sic1, Kpp_Cln2_Sic1, kpp_Clb5_Sic1, kpp_Cln2_Sic1, n1)
  Clb5_Sic1*(kpp_Cln2_Sic1*Cln2^n1/(Kpp_Cln2_Sic1^n1 + Cln2^n1) + kpp_Clb5_Sic1*Clb5^n1/(Kpp_Clb5_Sic1^n1 + Clb5^n1));
end

function Rate_Law_for_v_Cln2_p_1(Hog1_PP, Kp_Cln2, SBF, kI_Cln2_Hog1, kp_Cln2)
  kp_Cln2*SBF/(Kp_Cln2 + SBF)/(1 + kI_Cln2_Hog1*Hog1_PP);
end

function Rate_Law_for_v_Cln2_rel_1(Cln2, Cln2_Far1_p, kpp_Cln2_Far1p)
  kpp_Cln2_Far1p*Cln2_Far1_p*Cln2;
end

function Rate_Law_for_v_SBF_akt_1(Cln2, Cln3, Kpp_Cln2_Whi5, Kpp_Cln3_Whi5, SBF_Whi5, kpp_Cln2_Whi5, kpp_Cln3_Whi5, n_SBF)
  SBF_Whi5*(kpp_Cln3_Whi5*Cln3/(Kpp_Cln3_Whi5 + Cln3) + kpp_Cln2_Whi5*Cln2^n_SBF/(Kpp_Cln2_Whi5^n_SBF + Cln2^n_SBF));
end

function Rate_Law_for_v_SBF_inakt_Clb2_1(Clb2, SBF, kpp_SBF_Clb2)
  kpp_SBF_Clb2*SBF*Clb2;
end

function Rate_Law_for_v_SBF_dp_1(Cdc14_p, SBF_p, kdp_SBF)
  kdp_SBF*SBF_p*Cdc14_p;
end

function Rate_Law_for_v_Whi5_pp_1(Cln2, Cln3, Whi5, kpp_Cln2_Whi5, kpp_Cln3_Whi5)
  Whi5*(kpp_Cln2_Whi5*Cln2 + kpp_Cln3_Whi5*Cln3);
end

function Rate_Law_for_v_Whi5p_dp_1(Cdc14_p, Whi5_p, kdp_Whi5)
  Whi5_p*kdp_Whi5*Cdc14_p;
end

function Rate_Law_for_v_APC_inakt_Clb2_1(APC, Clb2, kpp_APC_Clb2)
  kpp_APC_Clb2*APC*Clb2;
end

function Rate_Law_for_v_Swi5_p_1(Kp_Swi5, Mcm1, kp_Swi5)
  kp_Swi5*Mcm1/(Kp_Swi5 + Mcm1);
end

function Rate_Law_for_v_Swi5_pp_Clb5_1(Clb5, Swi5, kpp_Swi5_Clb5)
  kpp_Swi5_Clb5*Swi5*Clb5;
end

function Rate_Law_for_v_Clb3_d_APC_1(APC, Clb3, kd_Clb3_APC)
  kd_Clb3_APC*Clb3*APC;
end

function Rate_law_for_v_APC_akt_Cdc14_1(APC_p, Cdc14_p, ka_APC_Cdc14)
  ka_APC_Cdc14*APC_p*Cdc14_p;
end

function Rate_Law_for_v_Clb5_Sic1_pp_Hog1_1(Clb5_Sic1, Hog1_PP, kpp_Clb5_Sic1_Hog1)
  kpp_Clb5_Sic1_Hog1*Hog1_PP*Clb5_Sic1;
end

function Rate_Law_for_v_Clb5_d_APC_1(APC, Clb5, kd_Clb5_APC)
  kd_Clb5_APC*Clb5*APC;
end

function Rate_Law_for_v_Clb2_pp_2_1(Clb2, Swe1, kpp_Swe1_Clb2)
  kpp_Swe1_Clb2*Swe1*Clb2;
end

function Rate_Law_for_v_Swe1_Hog1_1(Hog1_PP, Swe1, kI_Swe1_Hog1, kpp_Swe1_Hls1)
  kpp_Swe1_Hls1*Swe1/(1 + kI_Swe1_Hog1*Hog1_PP);
end

function Rate_Law_for_v_Mcm1_p_Clb2_fb_1(Clb2, Kp_Mcm1, kp_Mcm1, n_Mcm1)
  kp_Mcm1*Clb2^n_Mcm1/(Kp_Mcm1^n_Mcm1 + Clb2^n_Mcm1);
end

function Rate_Law_for_v_Clb2_dp_1_1(Clb2_p, Mih1, kdp_Clb2)
  kdp_Clb2*Clb2_p*Mih1;
end

function Rate_Law_for_v_APC_inakt_Clb5_1(APC, Clb5, kpp_APC_Clb5)
  kpp_APC_Clb5*APC*Clb5;
end

function Rate_Law_for_v_Cln3_rel_1(Cln2, Cln3_Far1_p, kpp_Cln2_Far1p)
  kpp_Cln2_Far1p*Cln3_Far1_p*Cln2;
end

function Rate_Law_for_v_Sic1_pp_Hog1_1(Hog1_PP, Sic1, kpp_Sic1_Hog1)
  kpp_Sic1_Hog1*Hog1_PP*Sic1;
end

function Rate_Law_for_v_Far1_p_1(Fus3, kp_Far1, kp_basal_Far1)
  kp_Far1*Fus3 + kp_basal_Far1;
end

function Rate_Law_for_v_Clb2_d_APC_1(APC, Clb2, kd_Clb2_APC)
  kd_Clb2_APC*Clb2*APC;
end

function Rate_law_for_v_Cdc14_akt_APC_1(APC, Cdc14, ka_Cdc14_APC)
  ka_Cdc14_APC*Cdc14*APC;
end

function Rate_Law_for_v_MBF_akt_1(Cln2, K_MBF, kp_MBF, n1)
  kp_MBF*Cln2^n1/(K_MBF^n1 + Cln2^n1);
end

function Rate_Law_for_v_Sic1_pp_1(Clb5, Cln2, Kpp_Clb5_Sic1, Kpp_Cln2_Sic1, Sic1, kpp_Clb5_Sic1, kpp_Cln2_Sic1, n1)
  Sic1*(kpp_Cln2_Sic1*Cln2^n1/(Kpp_Cln2_Sic1^n1 + Cln2^n1) + kpp_Clb5_Sic1*Clb5^n1/(Kpp_Clb5_Sic1^n1 + Clb5^n1));
end

function Rate_Law_for_v_Clb2_p_1_1(Hog1_PP, Kp_Clb2, Mcm1, kI_Clb2_Hog1, kp_Clb2)
  kp_Clb2*Mcm1/(Kp_Clb2 + Mcm1)/(1 + kI_Clb2_Hog1*Hog1_PP);
end

function Rate_Law_for_v_Clb2_pp_1_1(Clb2, Swe1, kpp_Clb2)
  kpp_Clb2*Clb2*Swe1;
end

function Rate_Law_for_v_Cdc14_akt_Clb2_1(Cdc14, Clb2, kpp_Cdc14_Clb2)
  kpp_Cdc14_Clb2*Cdc14*Clb2;
end

function Rate_Law_for_v_Sic1_p_1(Kp_Sic1, Swi5, kp_Sic1)
  kp_Sic1*Swi5/(Kp_Sic1 + Swi5);
end

function Rate_Law_for_v_Mcm1_p_basal_1(Clb3, V0_Mcm1, n_Mcm1, v0_Mcm1)
  v0_Mcm1*Clb3^n_Mcm1/(V0_Mcm1^n_Mcm1 + Clb3^n_Mcm1);
end

function Rate_law_for_v_Cdc14_akt_MEN_fb_1(Cdc14, Cdc14_p, kpp_Cdc14_MEN)
  kpp_Cdc14_MEN*Cdc14*Cdc14_p;
end

function Rate_Law_for_v_APC_akt_p_Mcm1_1(Kp_APC, Mcm1, kp_APC)
  kp_APC*Mcm1/(Kp_APC + Mcm1);
end

function Rate_Law_for_v_Swi5_dp_1(Cdc14_p, Swi5_p, kdp_Swi5_Cdc14)
  kdp_Swi5_Cdc14*Swi5_p*Cdc14_p;
end

function Rate_Law_for_v_Swi5_pp_Clb2_1(Clb2, Swi5, kpp_Swi5_Clb2)
  kpp_Swi5_Clb2*Swi5*Clb2;
end

function Rate_Law_for_v_Clb3_p_Clb5_1(Clb5, Kp_Clb3, kp_Clb3, n_Clb3)
  kp_Clb3*Clb5^n_Clb3/(Kp_Clb3^n_Clb3 + Clb5^n_Clb3);
end

function Rate_Law_for_v_Far1_dd_1(Cln2, Far1, kdd_Far1)
  kdd_Far1*Far1*Cln2;
end

function Rate_Law_for_v_Far1_pp_1(Far1, Fus3, kpp_Far1)
  kpp_Far1*Far1*Fus3;
end

function Rate_Law_for_v_Far1_p_dd_1(Cln2, Far1_p, kdd_Far1p)
  kdd_Far1p*Far1_p*Cln2;
end

model CellCycle()
  // model units - substance: substance, time: time_unit, volume: volume, area: area, length: length

  // Compartments:
  compartment volume = 50;

  // Species:
  species Clb5 in volume = 0.005509527/volume;
  species Clb5_Sic1 in volume = 0.899196/volume;
  species Clb5_Sic1_Hp in volume = 0;
  species Cln2 in volume = 0.3905887/volume;
  species Cln2_Far1_p in volume = 0;
  species Cln3 in volume = 70.25/volume;
  species Far1 in volume = 253.1709/volume;
  species Far1_p in volume = 0;
  species MBF in volume = 0.02681707/volume;
  species SBF in volume = 0.06160053/volume;
  species SBF_p in volume = 0.0005158735/volume;
  species SBF_Whi5 in volume = 349.9379/volume;
  species Sic1 in volume = 285.6042/volume;
  species Sic1_p in volume = 0.6127003/volume;
  species Sic1_Hp in volume = 0;
  species Whi5 in volume = 620.3747/volume;
  species Whi5_p in volume = 52.4121/volume;
  species Clb2 in volume = 0.3270032/volume;
  species Clb2_p in volume = 1.132558/volume;
  species Swe1 in volume = 16.51401/volume;
  species Swe1_p in volume = 263.706/volume;
  species Mcm1 in volume = 198.28/volume;
  species APC in volume = 47.76103/volume;
  species APC_p in volume = 0.04100875/volume;
  species Cdc14 in volume = 3421.569/volume;
  species Cdc14_p in volume = 338.4307/volume;
  species Mih1 in volume = 107/volume;
  species Swi5 in volume = 571.2755/volume;
  species Swi5_p in volume = 1.102596/volume;
  species Hog1_PP in volume = 0;
  species Fus3 in volume = 0;
  species Clb2_Sic1 in volume = 22.84052/volume;
  species Clb3 in volume = 1.622362/volume;
  species Cln3_Far1_p in volume = 0;
  species Clb3_Sic1 in volume = 277.8856/volume;

  // Parameters:
  Kp_Clb5 = 1;
  kI_Clb5_Hog1 = 1;
  kp_Clb5 = 1.87453125;
  kd_Clb5 = 0.187825;
  kcf_Clb5_Sic1 = 30;
  kcf_Clb5_Sic1_Hp = 600;
  Kpp_Clb5_Sic1 = 24.99;
  Kpp_Cln2_Sic1 = 40;
  kpp_Clb5_Sic1 = 21;
  kpp_Cln2_Sic1 = 0.43;
  n1 = 6;
  kd_Clb5_Sic1 = 0.1;
  Kp_Cln2 = 22.025;
  kI_Cln2_Hog1 = 20.029;
  kp_Cln2 = 28.0496125;
  kd_Cln2 = 0.2267;
  kcf_Cln2_Far1p = 6;
  kpp_Cln2_Far1p = 36;
  kd_Cln2_Far1p = 0.1;
  kp_Cln3 = 0.01405;
  kd_Cln3 = 0.01;
  Kpp_Cln2_Whi5 = 1.001;
  Kpp_Cln3_Whi5 = 85.0316195;
  kpp_Cln2_Whi5 = 2.0105;
  kpp_Cln3_Whi5 = 0.4032023;
  n_SBF = 4;
  kcf_SBF_Whi5 = 3;
  kpp_SBF_Clb2 = 4.058984;
  kdp_SBF = 0.5;
  kp_Whi5 = 0.16533;
  kd_Whi5 = 0.01;
  kdp_Whi5 = 1;
  K_MBF = 1; K_MBF is "Kp_MBF";
  kp_MBF = 3;
  kd_MBF = 0.2527;
  Kp_Sic1 = 15.028;
  kp_Sic1 = 3.169628;
  kd_Sic1 = 0.1;
  kd_Sic1p = 0.1;
  kpp_Sic1_Hog1 = 10;
  kpp_Clb5_Sic1_Hog1 = 10;
  kdp_Sic1_Hp = 1.5115;
  kdp_Clb5_Sic1_Hp = 0.2;
  kp_Far1 = 2.99896964;
  kp_basal_Far1 = 0.14066;
  kd_Far1 = 0.02;
  kd_Far1p = 0.1;
  V0_Mcm1 = 20.404;
  n_Mcm1 = 3;
  v0_Mcm1 = 40.050851;
  Kp_Mcm1 = 2.5;
  kp_Mcm1 = 60;
  kd_Mcm1 = 0.30555;
  Kp_Clb2 = 5000;
  kI_Clb2_Hog1 = 0.0001;
  kp_Clb2 = 121.5688;
  kd_Clb2 = 0.025;
  kd_Clb2_APC = 0.604;
  kpp_Clb2 = 350.267663;
  kdp_Clb2 = 15.7842816;
  kp_Swe1 = 0.56044;
  kd_Swe1 = 0.1;
  kpp_Swe1_Clb2 = 0.0995;
  kd_Swe1_p = 0.1;
  kI_Swe1_Hog1 = 100.1;
  kpp_Swe1_Hls1 = 1.596;
  kpp_Cdc14_Clb2 = 0.00700465;
  kpp_Cdc14_MEN = 1e-5;
  ka_Cdc14_APC = 0.5028;
  ki_Cdc14 = 5.029219;
  Kp_APC = 94288.25;
  kp_APC = 671.037047;
  ka_APC_Cdc14 = 3;
  kpp_APC_Clb2 = 1.009347;
  kpp_APC_Clb5 = 100;
  kd_APC = 0.22;
  kd_APC_p = 0.5;
  kdp_Swi5_Cdc14 = 50;
  Kp_Swi5 = 1000;
  kp_Swi5 = 2.392008;
  kd_Swi5 = 0.013;
  kpp_Swi5_Clb2 = 99.8;
  kpp_Swi5_Clb5 = 0.5005;
  kp_Mih1 = 0.214;
  kd_Mih1 = 0.1;
  Kp_Clb3 = 1;
  kp_Clb3 = 0.368352;
  n_Clb3 = 3;
  kd_Whi5p = 0.01;
  kcf_Clb2_Sic1 = 15;
  kd_Clb2_Sic1 = 0.5;
  kd_Clb3 = 0.005;
  kd_Clb3_APC = 0.05;
  kcf_Cln3_Far1p = 6;
  kcd_Cln3_Far1p = 0.5;
  kd_Cln3_Far1p = 0.0005;
  kdd_Far1 = 0.0033;
  kpp_Far1 = 10;
  kdp_Far1p = 0.05;
  kcd_Cln2_Far1p = 0.5;
  kcf_Clb3_Sic1 = 30;
  kdd_Far1p = 0.05;
  kd_Clb3_Sic1 = 0.01;
  kd_Clb5_APC = 1.001;
  kd_Clb2_p = 0.025;
  kd_Swi5_p = 0.013;
  kcd_Clb2_Sic1 = 1;
  kcd_Clb5_Sic1 = 1;
  kcd_Clb3_Sic1 = 1;
  kcd_Clb5_Sic1_Hp = 2;
  nutrition_factor = 1;

  // Reactions:
  v_Clb5_p: => Clb5; volume*Rate_Law_for_v_Clb5_p_1(Hog1_PP, Kp_Clb5, MBF, kI_Clb5_Hog1, kp_Clb5);  // modifiers: Hog1_PP, MBF
  v_Clb5_d: Clb5 => ; volume*kd_Clb5*Clb5;
  v_Clb5_ass_Sic1: Clb5 + Sic1 => Clb5_Sic1; volume*kcf_Clb5_Sic1*Clb5*Sic1;
  v_Clb5_ass_Sic1_Hp: Clb5 + Sic1_Hp => Clb5_Sic1_Hp; volume*kcf_Clb5_Sic1_Hp*Clb5*Sic1_Hp;
  v_Clb5_rel: Clb5_Sic1 => Clb5 + Sic1_p; volume*Rate_Law_for_v_Clb5_rel_1(Clb5, Clb5_Sic1, Cln2, Kpp_Clb5_Sic1, Kpp_Cln2_Sic1, kpp_Clb5_Sic1, kpp_Cln2_Sic1, n1);  // modifiers: Cln2
  v_Clb5_Sic1_d: Clb5_Sic1 => ; volume*kd_Clb5_Sic1*Clb5_Sic1;
  v_Cln2_p: => Cln2; volume*Rate_Law_for_v_Cln2_p_1(Hog1_PP, Kp_Cln2, SBF, kI_Cln2_Hog1, kp_Cln2);  // modifiers: Hog1_PP, SBF
  v_Cln2_d: Cln2 => ; volume*kd_Cln2*Cln2;
  v_Cln2_ass_Far1p: Cln2 + Far1_p => Cln2_Far1_p; volume*kcf_Cln2_Far1p*Cln2*Far1_p;
  v_Cln2_rel: Cln2_Far1_p => Cln2; volume*Rate_Law_for_v_Cln2_rel_1(Cln2, Cln2_Far1_p, kpp_Cln2_Far1p);
  v_Cln2_Far1p_d: Cln2_Far1_p => ; volume*kd_Cln2_Far1p*Cln2_Far1_p;
  v_Cln3_p: => Cln3; volume*Constant_flux__irreversible(kp_Cln3);
  v_Cln3_d: Cln3 => ; volume*kd_Cln3*Cln3;
  v_SBF_akt: SBF_Whi5 => SBF + Whi5_p; volume*Rate_Law_for_v_SBF_akt_1(Cln2, Cln3, Kpp_Cln2_Whi5, Kpp_Cln3_Whi5, SBF_Whi5, kpp_Cln2_Whi5, kpp_Cln3_Whi5, n_SBF);  // modifiers: Cln2, Cln3
  v_SBF_ass_Whi5: SBF + Whi5 => SBF_Whi5; volume*kcf_SBF_Whi5*SBF*Whi5;
  v_SBF_inakt_Clb2: SBF => SBF_p; volume*Rate_Law_for_v_SBF_inakt_Clb2_1(Clb2, SBF, kpp_SBF_Clb2);  // modifiers: Clb2
  v_SBF_dp: SBF_p => SBF; volume*Rate_Law_for_v_SBF_dp_1(Cdc14_p, SBF_p, kdp_SBF);  // modifiers: Cdc14_p
  v_Whi5_p: => Whi5; volume*Constant_flux__irreversible(kp_Whi5);
  v_Whi5_d: Whi5 => ; volume*kd_Whi5*Whi5;
  v_Whi5_pp: Whi5 => Whi5_p; volume*Rate_Law_for_v_Whi5_pp_1(Cln2, Cln3, Whi5, kpp_Cln2_Whi5, kpp_Cln3_Whi5);  // modifiers: Cln2, Cln3
  v_Whi5p_dp: Whi5_p => Whi5; volume*Rate_Law_for_v_Whi5p_dp_1(Cdc14_p, Whi5_p, kdp_Whi5);  // modifiers: Cdc14_p
  v_MBF_akt: => MBF; volume*Rate_Law_for_v_MBF_akt_1(Cln2, K_MBF, kp_MBF, n1);  // modifiers: Cln2
  v_MBF_d: MBF => ; volume*kd_MBF*MBF;
  v_Sic1_p: => Sic1; volume*Rate_Law_for_v_Sic1_p_1(Kp_Sic1, Swi5, kp_Sic1);  // modifiers: Swi5
  v_Sic1_d: Sic1 => ; volume*kd_Sic1*Sic1;
  v_Sic1_pp: Sic1 => Sic1_p; volume*Rate_Law_for_v_Sic1_pp_1(Clb5, Cln2, Kpp_Clb5_Sic1, Kpp_Cln2_Sic1, Sic1, kpp_Clb5_Sic1, kpp_Cln2_Sic1, n1);  // modifiers: Clb5, Cln2
  v_Sic1_p_d: Sic1_p => ; volume*kd_Sic1p*Sic1_p;
  v_Sic1_pp_Hog1: Sic1 => Sic1_Hp; volume*Rate_Law_for_v_Sic1_pp_Hog1_1(Hog1_PP, Sic1, kpp_Sic1_Hog1);  // modifiers: Hog1_PP
  v_Clb5_Sic1_pp_Hog1: Clb5_Sic1 => Clb5_Sic1_Hp; volume*Rate_Law_for_v_Clb5_Sic1_pp_Hog1_1(Clb5_Sic1, Hog1_PP, kpp_Clb5_Sic1_Hog1);  // modifiers: Hog1_PP
  v_Sic1_Hp_dp: Sic1_Hp => Sic1; volume*kdp_Sic1_Hp*Sic1_Hp;
  v_Clb5_Sic1_Hp_dp: Clb5_Sic1_Hp => Clb5_Sic1; volume*kdp_Clb5_Sic1_Hp*Clb5_Sic1_Hp;
  v_Far1_p: => Far1; volume*Rate_Law_for_v_Far1_p_1(Fus3, kp_Far1, kp_basal_Far1);  // modifiers: Fus3
  v_Far1_d: Far1 => ; volume*kd_Far1*Far1;
  v_Far1p_d: Far1_p => ; volume*kd_Far1p*Far1_p;
  v_Mcm1_p_basal: => Mcm1; volume*Rate_Law_for_v_Mcm1_p_basal_1(Clb3, V0_Mcm1, n_Mcm1, v0_Mcm1);  // modifiers: Clb3
  v_Mcm1_p_Clb2_fb: => Mcm1; volume*Rate_Law_for_v_Mcm1_p_Clb2_fb_1(Clb2, Kp_Mcm1, kp_Mcm1, n_Mcm1);  // modifiers: Clb2
  v_Mcm1_d: Mcm1 => ; volume*kd_Mcm1*Mcm1;
  v_Clb2_p: => Clb2; volume*Rate_Law_for_v_Clb2_p_1_1(Hog1_PP, Kp_Clb2, Mcm1, kI_Clb2_Hog1, kp_Clb2);  // modifiers: Hog1_PP, Mcm1
  v_Clb2_d: Clb2 => ; volume*kd_Clb2*Clb2;
  v_Clb2_d_APC: Clb2 => ; volume*Rate_Law_for_v_Clb2_d_APC_1(APC, Clb2, kd_Clb2_APC);  // modifiers: APC
  v_Clb2_pp: Clb2 => Clb2_p; volume*Rate_Law_for_v_Clb2_pp_1_1(Clb2, Swe1, kpp_Clb2);  // modifiers: Swe1
  v_Clb2_dp: Clb2_p => Clb2; volume*Rate_Law_for_v_Clb2_dp_1_1(Clb2_p, Mih1, kdp_Clb2);  // modifiers: Mih1
  v_Swe1_p: => Swe1; volume*Constant_flux__irreversible(kp_Swe1);
  v_Swe1_d: Swe1 => ; volume*kd_Swe1*Swe1;
  v_Swe1_pp: Swe1 => Swe1_p; volume*Rate_Law_for_v_Clb2_pp_2_1(Clb2, Swe1, kpp_Swe1_Clb2);  // modifiers: Clb2
  v_Swe1_p_d: Swe1_p => ; volume*kd_Swe1_p*Swe1_p;
  v_Swe1_Hog1: Swe1 => Swe1_p; volume*Rate_Law_for_v_Swe1_Hog1_1(Hog1_PP, Swe1, kI_Swe1_Hog1, kpp_Swe1_Hls1);  // modifiers: Hog1_PP
  v_Cdc14_akt_Clb2: Cdc14 => Cdc14_p; volume*Rate_Law_for_v_Cdc14_akt_Clb2_1(Cdc14, Clb2, kpp_Cdc14_Clb2);  // modifiers: Clb2
  v_Cdc14_akt_MEN_fb: Cdc14 => Cdc14_p; volume*Rate_law_for_v_Cdc14_akt_MEN_fb_1(Cdc14, Cdc14_p, kpp_Cdc14_MEN);
  v_Cdc14_akt_APC: Cdc14 => Cdc14_p; volume*Rate_law_for_v_Cdc14_akt_APC_1(APC, Cdc14, ka_Cdc14_APC);  // modifiers: APC
  v_Cdc14_inakt: Cdc14_p => Cdc14; volume*ki_Cdc14*Cdc14_p;
  v_APC_akt_p_Mcm1: => APC; volume*Rate_Law_for_v_APC_akt_p_Mcm1_1(Kp_APC, Mcm1, kp_APC);  // modifiers: Mcm1
  v_APC_akt_Cdc14: APC_p => APC; volume*Rate_law_for_v_APC_akt_Cdc14_1(APC_p, Cdc14_p, ka_APC_Cdc14);  // modifiers: Cdc14_p
  v_APC_inakt_Clb2: APC => APC_p; volume*Rate_Law_for_v_APC_inakt_Clb2_1(APC, Clb2, kpp_APC_Clb2);  // modifiers: Clb2
  v_APC_inakt_Clb5: APC => APC_p; volume*Rate_Law_for_v_APC_inakt_Clb5_1(APC, Clb5, kpp_APC_Clb5);  // modifiers: Clb5
  v_APC_d: APC => ; volume*kd_APC*APC;
  v_APC_p_d: APC_p => ; volume*kd_APC_p*APC_p;
  v_Swi5_dp: Swi5_p => Swi5; volume*Rate_Law_for_v_Swi5_dp_1(Cdc14_p, Swi5_p, kdp_Swi5_Cdc14);  // modifiers: Cdc14_p
  v_Swi5_p: => Swi5; volume*Rate_Law_for_v_Swi5_p_1(Kp_Swi5, Mcm1, kp_Swi5);  // modifiers: Mcm1
  v_Swi5_d: Swi5 => ; volume*kd_Swi5*Swi5;
  v_Swi5_pp_Clb2: Swi5 => Swi5_p; volume*Rate_Law_for_v_Swi5_pp_Clb2_1(Clb2, Swi5, kpp_Swi5_Clb2);  // modifiers: Clb2
  v_Swi5_pp_Clb5: Swi5 => Swi5_p; volume*Rate_Law_for_v_Swi5_pp_Clb5_1(Clb5, Swi5, kpp_Swi5_Clb5);  // modifiers: Clb5
  v_Mih1_p: => Mih1; volume*Constant_flux__irreversible(kp_Mih1);
  v_Mih1_d: Mih1 => ; volume*kd_Mih1*Mih1;
  v_Clb3_p_Clb5: => Clb3; volume*Rate_Law_for_v_Clb3_p_Clb5_1(Clb5, Kp_Clb3, kp_Clb3, n_Clb3);  // modifiers: Clb5
  v_Whi5_p_d: Whi5_p => ; volume*kd_Whi5p*Whi5_p;
  v_Clb2_ass_Sic1: Clb2 + Sic1 => Clb2_Sic1; volume*kcf_Clb2_Sic1*Clb2*Sic1;
  v_Clb2_Sic1_d: Clb2_Sic1 => ; volume*kd_Clb2_Sic1*Clb2_Sic1;
  v_Clb3_d: Clb3 => ; volume*kd_Clb3*Clb3;
  v_Clb3_d_APC: Clb3 => ; volume*Rate_Law_for_v_Clb3_d_APC_1(APC, Clb3, kd_Clb3_APC);  // modifiers: APC
  v_Cln3_ass_Far1p: Cln3 + Far1_p => Cln3_Far1_p; volume*kcf_Cln3_Far1p*Cln3*Far1_p;
  v_Cln3_diss_Far1p: Cln3_Far1_p => Cln3 + Far1_p; volume*kcd_Cln3_Far1p*Cln3_Far1_p;
  v_Cln3_rel: Cln3_Far1_p => Cln3; volume*Rate_Law_for_v_Cln3_rel_1(Cln2, Cln3_Far1_p, kpp_Cln2_Far1p);  // modifiers: Cln2
  v_Cln3_Far1p_d: Cln3_Far1_p => ; volume*kd_Cln3_Far1p*Cln3_Far1_p;
  v_Far1_dd: Far1 => ; volume*Rate_Law_for_v_Far1_dd_1(Cln2, Far1, kdd_Far1);  // modifiers: Cln2
  v_Far1_pp: Far1 => Far1_p; volume*Rate_Law_for_v_Far1_pp_1(Far1, Fus3, kpp_Far1);  // modifiers: Fus3
  v_Far1p_dp: Far1_p => Far1; volume*kdp_Far1p*Far1_p;
  v_Cln2_diss_Far1p: Cln2_Far1_p => Cln2 + Far1_p; volume*kcd_Cln2_Far1p*Cln2_Far1_p;
  v_Clb3_ass_Sic1: Clb3 + Sic1 => Clb3_Sic1; volume*kcf_Clb3_Sic1*Clb3*Sic1;
  v_Far1_p_dd: Far1_p => ; volume*Rate_Law_for_v_Far1_p_dd_1(Cln2, Far1_p, kdd_Far1p);  // modifiers: Cln2
  v_Clb3_Sic1_d: Clb3_Sic1 => ; volume*kd_Clb3_Sic1*Clb3_Sic1;
  v_Clb5_d_APC: Clb5 => ; volume*Rate_Law_for_v_Clb5_d_APC_1(APC, Clb5, kd_Clb5_APC);  // modifiers: APC
  v_Clb2_p_d: Clb2_p => ; volume*kd_Clb2_p*Clb2_p;
  v_Swi5_p_d: Swi5_p => ; volume*kd_Swi5_p*Swi5_p;
  v_Clb2_diss_Sic1: Clb2_Sic1 => Clb2 + Sic1; volume*kcd_Clb2_Sic1*Clb2_Sic1;
  v_Clb5_diss_Sic1: Clb5_Sic1 => Clb5 + Sic1; volume*kcd_Clb5_Sic1*Clb5_Sic1;
  v_Clb3_diss_Sic1: Clb3_Sic1 => Clb3 + Sic1; volume*kcd_Clb3_Sic1*Clb3_Sic1;
  v_Clb5_diss_Sic1_Hp: Clb5_Sic1_Hp => Clb5 + Sic1_Hp; volume*kcd_Clb5_Sic1_Hp*Clb5_Sic1_Hp;

  // Unit definitions:
  unit substance = item;
  unit length = metre;
  unit area = metre^2;
  unit volume = 1e-15 litre;
  unit time_unit = 0.06 second;
end
