// SBML level 3 version 1

model DAccumulationModel()
  // model units - time: second, extent: gram

  // Compartments:
  compartment cytosol = 1 dimensionless;

  // Species:
  species mass in cytosol = 2.6e-11/cytosol;  // substance in gram_dryweight
  species intactProt in cytosol = 0.46/cytosol;  // substance in fraction
  species damagedProt in cytosol = 0;  // substance in fraction

  // Parameters:
  g = 0.4 per_hour;
  f = 0.01 per_hour;
  r = 0.01 per_hour;

  // Reactions:
  growth: => mass; g*mass;
  D_prod_and_repair: intactProt -> damagedProt; f*intactProt - r*damagedProt;

  // Unit definitions:
  unit per_hour = 1 / (3600 second);
  unit gram_dryweight = gram;
  unit fraction = dimensionless;
end
